// SBML level 2 version 4

model Perelson_Science1996()
  // PEtab implementation of the model from Perelson et al. (1996), Science 15 Mar 1996: Vol. 271, Issue 5255, pp. 1582-1586
  // isDescribedBy doi:10.1126/science.271.5255.1582

  // Compartments:
  compartment default = 1;

  // Species:
  species Tstar in default = 15061.32;
  species V in default = 1860000;
  species V_I in default = 1860000;
  species V_NI in default = 0;

  // Parameters:
  N = 480;
  T0 = 11000;
  c = 2.06;
  delta = 0.53;
  k = 3.9e-7;

  // Reactions:
  v1: -> Tstar; k*T0*V_I;  // modifiers: V_I
  v2: Tstar -> ; delta*Tstar;
  v3: V + V_I -> ; c*V_I;
  v4: V + V_NI -> ; c*V_NI;
  v5: -> V + V_NI; delta*N*Tstar;  // modifiers: Tstar
end
